// SBML level 2 version 3

model MMR2()

  // Compartments:
  compartment CELL = 1;

  // Species:
  species $X1 in CELL = 2;
  species $X2 in CELL = 1;
  species S in CELL = 1;

  // Parameters:
  Vb_R1 = 1;
  KM_R1_X1 = 1;
  KM_R1_S = 1;
  Vf_R1 = 1;
  dG0_R1 = 0;
  KE_R1 = 1;
  KM_R2_X2 = 1;
  Vb_R2 = 1;
  dG0_R2 = 0;
  KE_R2 = 1;
  KM_R2_S = 1;
  Vf_R2 = 1;

  // Assignment rules:
  v_R1 := Vf_R1/KM_R1_X1*(X1 - S/KE_R1)/(1 + S/KM_R1_S + X1/KM_R1_X1);
  v_R2 := Vf_R2/KM_R2_S*(S - X2/KE_R2)/(1 + S/KM_R2_S + X2/KM_R2_X2);

  // Reactions:
  R1: $X1 -> S; Vf_R1/KM_R1_X1*(X1 - S/KE_R1)/(1 + S/KM_R1_S + X1/KM_R1_X1);
  R2: S -> $X2; Vf_R2/KM_R2_S*(S - X2/KE_R2)/(1 + S/KM_R2_S + X2/KM_R2_X2);
end
